// COMSOL Multiphysics 6.0.0.318 model "test_tracer_API3.mph"
// Outline of the model tree

Parameters
  theta = 0.3
  disp = 0.02

Functions
  rect1: Rectangle | lower = 450; upper = 2700+450

Geometry
  geom1 "Geometry 1" (1D, length unit m)
    i1: Interval | coord = {0, 0.162}
    fin: Finalize "Form Union"

Physics
  tds: DilutedSpeciesPorousMedia "Transport of Diluted Species in Porous Media" on all domains
    dependent variable c
    TransportMechanism.DispersionInPorousMedia = 1
    porous1: PorousMedium (default)
      fluid1: FluidPorousMedium "Fluid 1" (default)
        fluid = dommat
        DiffusionCoefficientSource = mat
        tauF = 1
        DF_c = 1e-9[m^2/s]
        Dchem_c = 1e-9[m^2/s]
        FluidDiffusivityModelType = MillingtonAndQuirkModel
        MobilityModel = NernstEinstein
        ume = 1e-13[s*mol/kg]
      pm1: PorousMatrixPorousMedium "Porous Matrix 1" (default) | solid = dommat; rhob = 800[kg/m^3]; rhope = 1000[kg/m^3]
    pmtp1: PorousMediaTransportProperties on all domains
      poro = theta
      u = {0.00021, 0, 0}
      FluidDiffusivityModelType = UserDefined
      DispersionTensor = Dispersivity
      alphaL = disp
      epsilon_p_mat = userdef
    nflx1: NoFlux (default)
    init1: init "Initial Values 1" (default) | initc = 0
    in1: Inflow on boundaries 1 | c0 = 1*rect1(t)
    open1: OpenBoundary on boundaries 2

Mesh
  mesh1 "Mesh 1" (physics-controlled)
    size: MeshSizeDefault | hauto = 4

Studies
  std1 "Study 1"
    time: Transient "Time Dependent"
      tlist = range(0,90,4500)
      useinitsol = on
      initstudy = zero
      usesol = on
      notstudy = zero

Solver configurations
  sol1 "Solution 1" (study std1)
    v1: Variables "Dependent Variables 1"
    t1: Time "Time-Dependent Solver 1" | tlist = range(0,90,4500); rtol = 0.005; maxorder = 2; stabcntrl = on
      fc1: FullyCoupled
        linsolver = d1
        maxiter = 8
        damp = 0.9
        jtech = once
        stabacc = aacc
        aaccdim = 5
        aaccmix = 0.9
        aaccdelay = 1
      d1: Direct "Direct, concentrations (tds)" | linsolver = pardiso; pivotperturb = 1.0E-13

Datasets
  dset1: Solution | solution = sol1

Derived values
  gev1: Global "Interpolation 1" | data = dset1; expr = c

Plots
  pg1: PlotGroup1D "Concentration (tds)" | data = dset1
    lngr1: LineGraph (disabled) on domains 1 | expr = c
    ptgr1: PointGraph on boundaries 2 | expr = c